*Heading
** Job name: CFRP_plate_2D Model name: Model-1
** Generated by: Abaqus/CAE 6.14-1
*Preprint, echo=NO, model=NO, history=NO, contact=NO
**
** PARTS
**
*Part, name=Part-1
*Node
      1,         -25.,           0.,          50.
      2,         -23.,           0.,          50.
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*Element, type=S4R
  1,   1,   2,  28,  27
  2,   2,   3,  29,  28
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** Region: (CompositeLayup-1-1: Generated From Layup)
*Elset, elset=CompositeLayup-1-1, generate
   1,  625,    1
** Section: CompositeLayup-1-1
*Shell Section, elset=CompositeLayup-1-1, composite, layup=CompositeLayup-1
1., 3, CFRP_2D, 0., Ply-1
1., 3, CFRP_2D, 90., Ply-2
1., 3, CFRP_2D, 45., Ply-3
1., 3, CFRP_2D, -45., Ply-4
*End Part
**
**
** ASSEMBLY
**
*Assembly, name=Assembly
**
*Instance, name=Part-1-1, part=Part-1
*End Instance
**
*Nset, nset=Set-1, instance=Part-1-1, generate
  26,  676,   26
*Elset, elset=Set-1, instance=Part-1-1, generate
  25,  625,   25
*Nset, nset=Set-2, instance=Part-1-1, generate
   1,  651,   26
*Elset, elset=Set-2, instance=Part-1-1, generate
   1,  601,   25
*End Assembly
**
** MATERIALS
**
*Material, name=CFRP_2D
*Damage Initiation, criterion=HASHIN
1340.,1192., 19.6, 92.3,  51.,  23.
*Damage Evolution, type=ENERGY
 48.4, 60.3,  4.5,  8.5
*Elastic, type=LAMINA
106000.,7200., 0.34,3400.,3400.,2520.
** ----------------------------------------------------------------
**
** STEP: Step-1
**
*Step, name=Step-1, nlgeom=YES, inc=300
*Static
0.01, 1., 1e-05, 0.01
**
** BOUNDARY CONDITIONS
**
** Name: BC-1 Type: Displacement/Rotation
*Boundary
Set-1, 1, 1
Set-1, 2, 2
Set-1, 3, 3
Set-1, 4, 4
Set-1, 5, 5
Set-1, 6, 6
** Name: BC-2 Type: Displacement/Rotation
*Boundary
Set-2, 1, 1, 1.
**
** OUTPUT REQUESTS
**
*Restart, write, frequency=0
**
** FIELD OUTPUT: F-Output-2
**
*Output, field
*Element Output, elset=Part-1-1.CompositeLayup-1-1, directions=YES
2, 5, 8, 11
HSNFCCRT, HSNFTCRT, HSNMCCRT, HSNMTCRT, MISES, S
**
** FIELD OUTPUT: F-Output-1
**
*Output, field, variable=PRESELECT
**
** HISTORY OUTPUT: H-Output-1
**
*Output, history, variable=PRESELECT
*End Step
